*Heading
** Job name: Fracture_CFRP_Tube-VUMAT Model name: Fracture_Analysis-Explicit-VUMAT
** Generated by: Abaqus/CAE 2022
*Preprint, echo=NO, model=NO, history=NO, contact=NO
**
** PARTS
**
*Part, name=Part-1-Copy
*Node
      1,          10.,  -20.8510342,         253.
      2,          10.,  -20.5039063,         253.
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*Element, type=C3D8R
 1,  3793,   420,  3775, 12771,   415,     1,   419,  3771
 2, 12771,  3775,  3776, 12772,  3771,   419,   418,  3772
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*Nset, nset=Cylinder_3D, generate
     1,  18394,      1
*Elset, elset=Cylinder_3D, generate
     1,  16640,      1
*Nset, nset=Set-RP-2
   379,   380,   381,   382,   383,   384
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*Elset, elset=Set-RP-2
 11559, 11560, 11561, 11562, 11563, 11564
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*Nset, nset=Set-RP-1
   343,   344,   345,   346,   347,   348
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*Elset, elset=Set-RP-1
  6897,  6898,  6899,  6900,  6901,  6902
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*Nset, nset=Set-Top-Edge
  156,  157,  313,  389, 1208, 1209
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*Elset, elset=Set-Top-Edge
  2090,  2092,  2094,  2121,  2122,  4276
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*Nset, nset=Set-SPDA-Point
  71,  72,  74,  80,  82,  84
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*Elset, elset=Set-SPDA-Point
  885,  890,  901,  902,  925,  930
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*Nset, nset=Outer_Surface
    89,    90,   118,   119,   156,   157
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*Elset, elset=Outer_Surface
  1396,  1397,  1398,  1399,  1400,  1406
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*Elset, elset=_Outer_Surface_S4, internal
   523,   524,   525,   526,   527,   528
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*Elset, elset=_Outer_Surface_S3, internal
  539,  540,  541,  542,  571,  572
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*Elset, elset=_Outer_Surface_S2, internal
  575,  576,  577,  578,  579,  580
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*Elset, elset=_Outer_Surface_S6, internal
 1051, 1053, 1055, 1057, 1059, 1061
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*Elset, elset=_Outer_Surface_S5, internal
  1396,  1397,  1398,  1399,  1400,  1406
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*Surface, type=ELEMENT, name=Outer_Surface
_Outer_Surface_S4, S4
_Outer_Surface_S3, S3
_Outer_Surface_S2, S2
_Outer_Surface_S6, S6
_Outer_Surface_S5, S5
*Elset, elset=_Internal_Surface_S6, internal
   891,   893,   895,   897,   899,   901
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*Elset, elset=_Internal_Surface_S5, internal
   916,   917,   918,   919,   920,   926
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*Elset, elset=_Internal_Surface_S3, internal
   71,   72,   73,   74,  123,  124
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*Elset, elset=_Internal_Surface_S4, internal
    65,    66,    67,    68,    69,    70
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*Elset, elset=_Internal_Surface_S2, internal, generate
 113,  116,    1
*Surface, type=ELEMENT, name=Internal_Surface
_Internal_Surface_S6, S6
_Internal_Surface_S5, S5
_Internal_Surface_S4, S4
_Internal_Surface_S2, S2
_Internal_Surface_S3, S3
*Distribution, name=Ori-7-DiscOrient, location=ELEMENT, Table=Ori-7-DiscOrient_Table
** Description: Distribution generated from Discrete Orientation
,           1.,           0.,           0.,           0.,           1.,           0.
1, 0.919580161571503, 0.392902493476868,           0.,           0.,           0.,           1.
2, 0.951190292835236, 0.308605045080185,           0.,           0.,           0.,           1.
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13560, 0.993712186813354, 0.111964471638203,           0.,           0.,           0.,           1.
*Orientation, name=Ori-7, system=RECTANGULAR
Ori-7-DiscOrient
3, 135.
** Region: (Section-1:Cylinder_3D), (Material Orientation:Ply-2)
*Elset, elset=_I1, internal
     1,     2,     3,     4,     5,     6
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** Section: Section-1
*Solid Section, elset=_I1, orientation=Ori-7, material=CFRP-VUMAT
,
*Distribution, name=Ori-8-DiscOrient, location=ELEMENT, Table=Ori-8-DiscOrient_Table
** Description: Distribution generated from Discrete Orientation
,           1.,           0.,           0.,           0.,           1.,           0.
59, 0.971017003059387, 0.23901030421257,           0.,           0.,           0.,           1.
60, 0.949447810649872, 0.313924968242645,           0.,           0.,           0.,           1.
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16640, -0.993712186813354, 0.111964471638203,           0.,           0.,           0.,           1.
*Orientation, name=Ori-8, system=RECTANGULAR
Ori-8-DiscOrient
3, 45.
** Region: (Section-1:Cylinder_3D), (Material Orientation:Ply-1)
*Elset, elset=_I2, internal
    59,    60,    61,    62,    63,    64
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** Section: Section-1
*Solid Section, elset=_I2, orientation=Ori-8, material=CFRP-VUMAT
,
*Distribution, name=Ori-6-DiscOrient, location=ELEMENT, Table=Ori-6-DiscOrient_Table
** Description: Distribution generated from Discrete Orientation
,           1.,           0.,           0.,           0.,           1.,           0.
233, 0.922338247299194, 0.386383503675461,           0.,           0.,           0.,           1.
234, 0.952177882194519, 0.305544197559357,           0.,           0.,           0.,           1.
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14792, 0.993712186813354, 0.111964479088783,           0.,           0.,           0.,           1.
*Orientation, name=Ori-6, system=RECTANGULAR
Ori-6-DiscOrient
3, 0.
** Region: (Section-1:Cylinder_3D), (Material Orientation:Ply-3)
*Elset, elset=_I3, internal
   233,   234,   235,   236,   237,   238
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** Section: Section-1
*Solid Section, elset=_I3, orientation=Ori-6, material=CFRP-VUMAT
,
*Distribution, name=Ori-5-DiscOrient, location=ELEMENT, Table=Ori-5-DiscOrient_Table
** Description: Distribution generated from Discrete Orientation
,           1.,           0.,           0.,           0.,           1.,           0.
291, 0.976465046405792, 0.215675726532936,           0.,           0.,           0.,           1.
292, 0.953884065151215, 0.300175309181213,           0.,           0.,           0.,           1.
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15870, 0.993712186813354, 0.111964471638203,           0.,           0.,           0.,           1.
*Orientation, name=Ori-5, system=RECTANGULAR
Ori-5-DiscOrient
3, 90.
** Region: (Section-1:Cylinder_3D), (Material Orientation:Ply-4)
*Elset, elset=_I4, internal
   291,   292,   293,   294,   295,   296
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** Section: Section-1
*Solid Section, elset=_I4, orientation=Ori-5, material=CFRP-VUMAT
,
*Distribution, name=Ori-4-DiscOrient, location=ELEMENT, Table=Ori-4-DiscOrient_Table
** Description: Distribution generated from Discrete Orientation
,           1.,           0.,           0.,           0.,           1.,           0.
349, 0.926523506641388, 0.376236915588379,           0.,           0.,           0.,           1.
350, 0.954731941223145, 0.297467529773712,           0.,           0.,           0.,           1.
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16332, 0.111964471638203, 0.993712186813354,           0.,           0.,           0.,           1.
*Orientation, name=Ori-4, system=RECTANGULAR
Ori-4-DiscOrient
3, 90.
** Region: (Section-1:Cylinder_3D), (Material Orientation:Ply-5)
*Elset, elset=_I5, internal
   349,   350,   351,   352,   353,   354
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** Section: Section-1
*Solid Section, elset=_I5, orientation=Ori-4, material=CFRP-VUMAT
,
*Distribution, name=Ori-3-DiscOrient, location=ELEMENT, Table=Ori-3-DiscOrient_Table
** Description: Distribution generated from Discrete Orientation
,           1.,           0.,           0.,           0.,           1.,           0.
407, 0.977731466293335, 0.209859922528267,           0.,           0.,           0.,           1.
408, 0.956357955932617, 0.292197614908218,           0.,           0.,           0.,           1.
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16178, 0.993712186813354, 0.111964471638203,           0.,           0.,           0.,           1.
*Orientation, name=Ori-3, system=RECTANGULAR
Ori-3-DiscOrient
3, 0.
** Region: (Section-1:Cylinder_3D), (Material Orientation:Ply-6)
*Elset, elset=_I6, internal
   407,   408,   409,   410,   411,   412
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** Section: Section-1
*Solid Section, elset=_I6, orientation=Ori-3, material=CFRP-VUMAT
,
*Distribution, name=Ori-2-DiscOrient, location=ELEMENT, Table=Ori-2-DiscOrient_Table
** Description: Distribution generated from Discrete Orientation
,           1.,           0.,           0.,           0.,           1.,           0.
465, 0.930371761322021, 0.366617470979691,           0.,           0.,           0.,           1.
466, 0.957081735134125, 0.289818078279495,           0.,           0.,           0.,           1.
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15408, 0.111964471638203, 0.993712186813354,           0.,           0.,           0.,           1.
*Orientation, name=Ori-2, system=RECTANGULAR
Ori-2-DiscOrient
3, 135.
** Region: (Section-1:Cylinder_3D), (Material Orientation:Ply-7)
*Elset, elset=_I7, internal
   465,   466,   467,   468,   469,   470
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** Section: Section-1
*Solid Section, elset=_I7, orientation=Ori-2, material=CFRP-VUMAT
,
*Distribution, name=Ori-1-DiscOrient, location=ELEMENT, Table=Ori-1-DiscOrient_Table
** Description: Distribution generated from Discrete Orientation
,           1.,           0.,           0.,           0.,           1.,           0.
523, 0.932179629802704, 0.361995995044708,           0.,           0.,           0.,           1.
524, 0.958185613155365, 0.28614729642868,           0.,           0.,           0.,           1.
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14176, 0.111964479088783, 0.993712186813354,           0.,           0.,           0.,           1.
*Orientation, name=Ori-1, system=RECTANGULAR
Ori-1-DiscOrient
3, 45.
** Region: (Section-1:Cylinder_3D), (Material Orientation:Ply-8)
*Elset, elset=_I8, internal
   523,   524,   525,   526,   527,   528
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** Section: Section-1
*Solid Section, elset=_I8, orientation=Ori-1, material=CFRP-VUMAT
,
*End Part
**
**
** ASSEMBLY
**
*Assembly, name=Assembly
**
*Instance, name=Part-1-Copy-1, part=Part-1-Copy
*End Instance
**
*Node
      1,           0.,           0.,           0.
*Nset, nset=RP-1
 1,
*Nset, nset=Set-2
 1,
*Nset, nset=Set-3, instance=Part-1-Copy-1
   343,   344,   345,   346,   347,   348
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*Elset, elset=Set-3, instance=Part-1-Copy-1
  6897,  6898,  6899,  6900,  6901,  6902
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*Nset, nset=Set-4, instance=Part-1-Copy-1
   379,   380,   381,   382,   383,   384
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*Elset, elset=Set-4, instance=Part-1-Copy-1
 11559, 11560, 11561, 11562, 11563, 11564
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** Constraint: Constraint-RP-1
*Equation
2
Set-3, 3, 1.
RP-1, 3, -1.
*End Assembly
*Distribution Table, name=Ori-7-DiscOrient_Table
coord3D, coord3D
*Distribution Table, name=Ori-8-DiscOrient_Table
coord3D, coord3D
*Distribution Table, name=Ori-6-DiscOrient_Table
coord3D, coord3D
*Distribution Table, name=Ori-5-DiscOrient_Table
coord3D, coord3D
*Distribution Table, name=Ori-4-DiscOrient_Table
coord3D, coord3D
*Distribution Table, name=Ori-3-DiscOrient_Table
coord3D, coord3D
*Distribution Table, name=Ori-2-DiscOrient_Table
coord3D, coord3D
*Distribution Table, name=Ori-1-DiscOrient_Table
coord3D, coord3D
*Amplitude, name=Amp-1
             0.,              0.,           0.001,           0.001,           0.002,           0.002,           0.003,           0.003
          0.004,           0.004,           0.005,           0.005,           0.006,           0.006,           0.007,           0.007
          0.008,           0.008,           0.009,           0.009,            0.01,            0.01,           0.011,           0.011
          0.012,           0.012,           0.013,           0.013,           0.014,           0.014,           0.015,           0.015
          0.016,           0.016,           0.017,           0.017,           0.018,           0.018,           0.019,           0.019
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             1.,              1.
**
** MATERIALS
**
*Material, name=CFRP
*Density
 1.8e-09,
*Elastic, type=ENGINEERING CONSTANTS
133000.,11500.,11500.,  0.32,  0.32,  0.37, 4800., 4800.
 4200.,
*Material, name=CFRP-VUMAT
*Density
 1.8e-09,
*Depvar, delete=5
     17,
*User Material, constants=19
133000.,11500.,11500.,  0.32,  0.32,  0.37, 4800., 4800.
 4200., 2100.,  972.,   37.,  147.,   37.,  147.,  71.5
  71.5,   32., 1e-09
**
** BOUNDARY CONDITIONS
**
** Name: BC-Set-RP-1 Type: Displacement/Rotation
*Boundary
Set-3, 1, 1
Set-3, 2, 2
** Name: BC-Set-RP-2 Type: Displacement/Rotation
*Boundary
Set-4, 1, 1
Set-4, 2, 2
Set-4, 3, 3
** ----------------------------------------------------------------
**
** STEP: Step-1
**
*Step, name=Step-1, nlgeom=YES
*Dynamic, Explicit
, 1.
*Bulk Viscosity
0.06, 1.2
**
** BOUNDARY CONDITIONS
**
** Name: Displacement_Load Type: Displacement/Rotation
*Boundary, amplitude=Amp-1
RP-1, 3, 3, 10.
**
** OUTPUT REQUESTS
**
*Restart, write, number interval=1, time marks=NO
**
** FIELD OUTPUT: F-Output-1
**
*Output, field, time interval=0.001
*Node Output
A, RF, U, V
*Element Output, directions=YES
EVF, LE, PE, PEEQ, PEEQVAVG, PEVAVG, S, SDV, STATUS, SVAVG
*Contact Output
CSTRESS,
**
** HISTORY OUTPUT: H-Output-2
**
*Output, history, variable=PRESELECT
*End Step
